X := 5
i := 0 .. 50000
Y := 7
N[i] := i
M[i] := N[i] + X - Y
z := 10 .. 16000
F[z] := log(M[z]) + M[z] + N[z]*M[z] + X*sum(log(j) + 1, j = 1 .. X) + sum(log(M[z] - X + k), k = 1 .. Y)
FF[z] := M[z] + M[z] + M[z]*N[z]*sum(log(k), k = 1 .. N[z])
FFF[z] := N[z] + M[z] + N[z] + sum(log(k), k = 1 .. N[z])
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